<?xml version="1.0"?>
<?xml-stylesheet type="text/xsl" href="http://jsbsim.sourceforge.net/JSBSim.xsl"?>

<fdm_config name="SudAviation-Caravelle" version="2.0" release="ALPHA"
	    xmlns:xsi="http://www.w3.org/2001/XMLSchema-instance"
	    xsi:noNamespaceSchemaLocation="http://jsbsim.sourceforge.net/JSBSim.xsd">

  <fileheader>
    <author>IAHM-COL; Aeromatic v 3.3.10</author>
    <filecreationdate>08/05/2017</filecreationdate>
    <version>$Revision: 1.79 $</version>
    <description>SudAviation Caravelle FDM. License: GPL 3.0+</description>
  </fileheader>

  <!--
      File:     SudAviation-Caravelle.xml
      Inputs:
      name:          SudAviation-Caravelle
      type:          Multi-engine Passenger Jet Airliner, Transonic Jet Transport
      stall speed:   95.00kts
      max weight:    101410.00 lb
      length:        32 m
      wing:
      span:         35 m
      area:         146.7 sq-m
      mean chord:   24 m

      aspect ratio: 8.00:1
      taper ratio:  5.11:1
      incidence:    4.00 degrees
      dihedral:     3.00 degrees
      sweep:        20.00 degrees

      no. engines:   2
      engine type:   Turbine Engine
      engine layout: aft fuselage

      control type:   Conventional Controls

      gear type:     tricycle
      steering type: steering
      retractable?:  yes

      Outputs:
      wing loading:       64.22 lb/sq-ft
      - thickness ratio: 36.80%
      payload:            20001.43 lbs
      CL-alpha:           5.19 per radian
      CL-0:               0.38
      CL-max:             2.10
      CD-0:               0.07
      K:                  0.04
      Mcrit:              0.79

      min. turn radius    134.5 m
      max. turn rate:     0.40 deg/s
  -->

  <metrics>
    <wingarea  unit="M2">146.6939</wingarea>
    <wingspan  unit="M" >34.30</wingspan>
    <wing_incidence unit="DEG">4.00</wing_incidence>
    <chord     unit="M" >23.60</chord>
    <htailarea unit="M2">30.30</htailarea>
    <htailarm  unit="M" >14.082</htailarm>
    <vtailarea  unit="M2">17.12</vtailarea>
    <vtailarm  unit="M" >19.245</vtailarm>

    <location name="AERORP" unit="M">
      <x>14.55692</x>
      <y>0.00</y>
      <z>0.00</z>
    </location>
    <location name="EYEPOINT" unit="M">
      <x>1.08895</x>
      <y>-0.14834</y>
      <z>0.77088</z>
    </location>
    <location name="VRP" unit="M">
      <x>0.0</x>
      <y>0.0</y>
      <z>0.0</z>
    </location>
  </metrics>

  <mass_balance>
    <ixx unit="SLUG*FT2">704014.30</ixx>
    <iyy unit="SLUG*FT2">1416910.00</iyy>
    <izz unit="SLUG*FT2">2227259.00</izz>
    <emptywt unit="LBS" >59256</emptywt>

    <location name="CG" unit="M">
      <x>14.55692</x>
      <y>0.00</y>
      <z>-0.8001</z>
    </location>

    <pointmass name="Payload">
      <description>38236.5 LBS should bring model up to entered max weight </description>
      <weight unit="LBS">10000.71</weight>
      <location name="POINTMASS" unit="M">
	<x>14.55692</x>
	<y>0.00</y>
	<z>-0.8001</z>
      </location>
    </pointmass>

	<!-- Poinbtmasses are for changeable masses, like more or less passengers, fatter pilots, more cargo. The engines are part of the plane weight -->
    <!--engines pointmass-->
    <!-- pointmass name="Payload">
      <description>Left RR-Avon</description>
      <weight unit="LBS">2890</weight>
      <location name="POINTMASS" unit="M">
	<x>21.58</x>
	<y>-2.643</y>
	<z>-0.777</z>
      </location>
    </pointmass>

    <pointmass name="Payload">
      <description>Right RR-Avon</description>
      <weight unit="LBS">2890</weight>
      <location name="POINTMASS" unit="M">
	<x>21.58</x>
	<y>2.643</y>
	<z>-0.777</z>
      </location>
    </pointmass -->

		<!-- but we have people, only I have not figured where yet -->
		<pointmass name="CockpitCrew">
			<weight unit="LBS">660</weight>
			<location name="POINTMASS" unit="IN">
				<x>-416.458</x>
				<y>0</y>
				<z>1.14</z>
			</location>
		</pointmass>

		<pointmass name="CabinCrew">
			<weight unit="LBS">220</weight>
			<location name="POINTMASS" unit="IN">
				<x>-416.458</x>
				<y>0</y>
				<z>1.14</z>
			</location>
		</pointmass>

		<pointmass name="Passengers">
			<weight unit="LBS">16000</weight>
			<location name="POINTMASS" unit="IN">
				<x>-100.102</x>
				<y>0</y>
				<z>1.14</z>
			</location>
		</pointmass>

  </mass_balance>

  <propulsion>

    <engine file="Avon">
      <location unit="M">
	<x>22.19453</x>
	<y>-2.64774</y>
	<z>0.73107</z>
      </location>
      <orient unit="DEG">
	<pitch>0.00</pitch>
	<roll>0.00</roll>
        <yaw>0.00</yaw>
      </orient>
      <feed>2</feed>

      <thruster file="direct">
	<sense>1</sense>
	<location unit="M">
	  <x>22.19453</x>
	  <y>-2.64774</y>
	  <z>0.73107</z>
	</location>
	<orient unit="DEG">
	  <pitch>0.00</pitch>
          <roll>0.00</roll>
          <yaw>0.00</yaw>
	</orient>
      </thruster>
    </engine>

    <engine file="Avon">
      <location unit="M">
	<x>22.19453</x>
	<y>2.64774</y>
	<z>0.73107</z>
      </location>
      <orient unit="DEG">
	<pitch>0.00</pitch>
	<roll>0.00</roll>
        <yaw>0.00</yaw>
      </orient>
      <feed>2</feed>

      <thruster file="direct">
	<sense>1</sense>
	<location unit="M">
	  <x>22.19453</x>
	  <y>2.64774</y>
	  <z>0.73107</z>
	</location>
	<orient unit="DEG">
	  <pitch>0.00</pitch>
          <roll>0.00</roll>
          <yaw>0.00</yaw>
	</orient>
      </thruster>
    </engine>

    <tank type="FUEL" number="0">
      <location unit="M">
	<x>15.25</x>
	<y>0.00</y>
	<z>-0.75</z>
      </location>
      <capacity unit="LBS">18770</capacity>
      <contents unit="LBS">9000</contents>
    </tank>

    <tank type="FUEL" number="1">
      <location unit="M">
	<x>15.25</x>
	<y>-3.80</y>
	<z>-0.75</z>
      </location>
      <capacity unit="LBS">18770</capacity>
      <contents unit="LBS">9000</contents>
    </tank>

    <tank type="FUEL" number="2">
      <location unit="M">
	<x>15.25</x>
	<y>3.80</y>
	<z>-0.75</z>
      </location>
      <capacity unit="LBS">130</capacity>
      <contents unit="LBS">115</contents>
    </tank>

  </propulsion>

  <ground_reactions>

    <contact type="BOGEY" name="NOSE">
      <location unit="M">
	<x>5.82224</x>
	<y>0.00</y>
	<z>-2.33322</z>
      </location>
      <static_friction>0.80</static_friction>
      <dynamic_friction>0.50</dynamic_friction>
      <rolling_friction>0.02</rolling_friction>
      <spring_coeff  unit="LBS/FT">30423.00</spring_coeff>
      <damping_coeff unit="LBS/FT/SEC">15211.50</damping_coeff>
      <max_steer unit="DEG">15.00</max_steer>
      <brake_group>NONE</brake_group>
      <retractable>1</retractable>
    </contact>

    <contact type="BOGEY" name="LEFT_MAIN">
      <location unit="M">
	<x>18.62364</x>
	<y>-2.88600</y>
	<z>-2.33322</z>
      </location>
      <static_friction>0.80</static_friction>
      <dynamic_friction>0.50</dynamic_friction>
      <rolling_friction>0.02</rolling_friction>
      <spring_coeff  unit="LBS/FT">101410.00</spring_coeff>
      <damping_coeff unit="LBS/FT/SEC">50705.00</damping_coeff>
      <max_steer unit="DEG">0</max_steer>
      <brake_group>LEFT</brake_group>
      <retractable>1</retractable>
    </contact>

    <contact type="BOGEY" name="RIGHT_MAIN">
      <location unit="M">
	<x>18.62364</x>
	<y>2.88600</y>
	<z>-2.33322</z>
      </location>
      <static_friction>0.80</static_friction>
      <dynamic_friction>0.50</dynamic_friction>
      <rolling_friction>0.02</rolling_friction>
      <spring_coeff  unit="LBS/FT">101410.00</spring_coeff>
      <damping_coeff unit="LBS/FT/SEC">50705.00</damping_coeff>
      <max_steer unit="DEG">0</max_steer>
      <brake_group>RIGHT</brake_group>
      <retractable>1</retractable>
    </contact>

    <contact type="STRUCTURE" name="LEFT_WING">
      <location unit="M">
	<x>21.40401</x>
	<y>-17.07</y>
	<z>-0.05466</z>
      </location>
      <static_friction>1</static_friction>
      <dynamic_friction>1</dynamic_friction>
      <spring_coeff unit="LBS/FT">101410.00</spring_coeff>
      <damping_coeff unit="LBS/FT/SEC">101410.00</damping_coeff>
    </contact>

    <contact type="STRUCTURE" name="RIGHT_WING">
      <location unit="M">
	<x>21.40401</x>
	<y>17.07305</y>
	<z>-0.05466</z>
      </location>
      <static_friction>1</static_friction>
      <dynamic_friction>1</dynamic_friction>
      <spring_coeff unit="LBS/FT">101410.00</spring_coeff>
      <damping_coeff unit="LBS/FT/SEC">101410.00</damping_coeff>
    </contact>

  </ground_reactions>

  <system file="Propulsion.xml"/>
  <system file="Fuel.xml"/>
  <system file="AircraftControl.xml"/>
  <system file="LandingGear.xml"/>
  <system file="Flaps.xml"/>
  <system file="Spoilers.xml"/>
  <system file="Speedbrake.xml"/>

  <flight_control name="FCS: SudAviation-Caravelle">

  </flight_control>

  <aerodynamics>

    <axis name="LIFT">

      <!-- Lift above 0.85 and below -0.85 is generalised -->
      <function name="aero/force/Lift_alpha">
	<description>Lift due to alpha</description>
	<product>
          <property>aero/qbar-psf</property>
          <property>metrics/Sw-sqft</property>
          <table>
            <independentVar lookup="row">aero/alpha-rad</independentVar>
            <tableData>
              -1.57  0.0000
              -1.22 -0.4063
              -1.05 -0.5473
              -0.88 -0.6320
              -0.67 -0.6881
              -0.40 -1.7202
              0.00  0.3817
              0.33  2.1020
              0.60  1.0698
              0.88  1.3680
              1.05  1.1847
              1.22  0.8793
              1.57  0.0000
            </tableData>
          </table>
	</product>
      </function>

      <function name="aero/force/Lift_pitch_rate">
        <description>Lift due to pitch rate</description>
        <product>
          <property>aero/qbar-psf</property>
          <property>metrics/Sw-sqft</property>
          <property>velocities/q-aero-rad_sec</property>
          <property>aero/ci2vel</property>
          <value>1.0166</value>
        </product>
      </function>

      <function name="aero/force/Lift_alpha_rate">
        <description>Lift due to alpha rate</description>
        <product>
          <property>aero/qbar-psf</property>
          <property>metrics/Sw-sqft</property>
          <property>aero/alphadot-rad_sec</property>
          <property>aero/ci2vel</property>
          <value>0.4066</value>
        </product>
      </function>

      <function name="aero/force/Lift_elevator">
	<description>Lift due to Elevator Deflection</description>
	<product>
          <property>aero/qbar-psf</property>
          <property>metrics/Sw-sqft</property>
          <property>fcs/elevator-pos-rad</property>
          <value>0.5540</value>
	</product>
      </function>

      <function name="aero/force/Lift_flap">
	<description>Delta Lift due to flaps</description>
	<product>
          <property>aero/qbar-psf</property>
          <property>metrics/Sw-sqft</property>
          <property>fcs/flap-pos-deg</property>
          <value>0.0440</value>
	</product>
      </function>


      <function name="aero/force/Lift_spoilers">
	<description>Delta Lift due to spoilers</description>
	<product>
          <property>aero/qbar-psf</property>
          <property>metrics/Sw-sqft</property>
          <property>fcs/spoilers-pos-norm</property>
          <value>-0.1000</value>
	</product>
      </function>

    </axis>

    <axis name="DRAG">

      <!-- CD0 is based on fuselage, wing, horizontal- en vertical tail -->
      <!-- Antennas, struts and wires are not taken into account        -->
      <!-- CD for gear (fixed and retractable) is defined below         -->
      <function name="aero/force/Drag_minimum">
	<description>Minimum drag</description>
	<product>
          <property>aero/qbar-psf</property>
          <property>metrics/Sw-sqft</property>
          <value>0.0731</value>
	</product>
      </function>

      <function name="aero/force/Drag_alpha">
	<description>Drag due to alpha</description>
	<product>
          <property>aero/qbar-psf</property>
          <property>metrics/Sw-sqft</property>
          <table>
            <independentVar lookup="row">aero/alpha-rad</independentVar>
            <tableData>
              -1.57    1.4082
              -0.33    5.5358
              0.00    0.0000
              0.33    5.5358
              1.57    1.4082
            </tableData>
          </table>
	</product>
      </function>

      <function name="aero/force/Drag_induced">
	<description>Induced drag</description>
        <product>
          <property>aero/qbar-psf</property>
          <property>metrics/Sw-sqft</property>
          <property>aero/cl-squared</property>
          <value>4.2153</value>
        </product>
      </function>

      <function name="aero/force/Drag_mach">
	<description>Drag due to mach</description>
        <product>
          <property>aero/qbar-psf</property>
          <property>metrics/Sw-sqft</property>
          <table>
            <independentVar lookup="row">velocities/mach</independentVar>
            <tableData>
              0.00    0.0000
              0.79    0.0000
              1.10    0.0230
              1.80    0.0150
            </tableData>
          </table>
        </product>
      </function>

      <function name="aero/force/Drag_beta">
	<description>Drag due to sideslip</description>
	<product>
          <property>aero/qbar-psf</property>
          <property>metrics/Sw-sqft</property>
          <table>
            <independentVar lookup="row">aero/beta-rad</independentVar>
            <tableData>
              -1.57    1.2300
              -0.26    0.0500
              0.00    0.0000
              0.26    0.0500
              1.57    1.2300
            </tableData>
          </table>
	</product>
      </function>

      <function name="aero/force/Drag_elevator">
	<description>Drag due to Elevator Deflection</description>
	<product>
          <property>aero/qbar-psf</property>
          <property>metrics/Sw-sqft</property>
          <abs><property>fcs/elevator-pos-rad</property></abs>
          <value>0.0400</value>
	</product>
      </function>

      <function name="aero/force/Drag_gear">
	<description>Drag due to gear</description>
        <product>
          <property>aero/qbar-psf</property>
          <property>metrics/Sw-sqft</property>
          <property>gear/gear-pos-norm</property>
          <value>0.0150</value>
        </product>
      </function>

      <function name="aero/force/Drag_flap">
	<description>Drag due to flaps</description>
        <product>
          <property>aero/qbar-psf</property>
          <property>metrics/Sw-sqft</property>
          <property>fcs/flap-pos-deg</property>
          <value>0.0017</value>
        </product>
      </function>


      <function name="aero/force/Drag_spoilers">
	<description>Drag due to spoilers</description>
        <product>
          <property>aero/qbar-psf</property>
          <property>metrics/Sw-sqft</property>
          <property>fcs/spoilers-pos-norm</property>
          <value>0.0731</value>
        </product>
      </function>

      <function name="aero/force/Drag_speedbrake">
	<description>Drag due to speedbrakes</description>
        <product>
          <property>aero/qbar-psf</property>
          <property>metrics/Sw-sqft</property>
          <property>fcs/speedbrake-pos-norm</property>
          <value>0.1200</value>
        </product>
      </function>

    </axis>

    <axis name="SIDE">

      <function name="aero/force/Side_beta">
	<description>Side force due to beta</description>
	<product>
          <property>aero/qbar-psf</property>
          <property>metrics/Sw-sqft</property>
          <property>aero/beta-rad</property>
          <value>-0.5491</value>
	</product>
      </function>
      <function name="aero/force/Side_roll_rate">
	<description>Side force due to roll rate</description>
	<product>
          <property>aero/qbar-psf</property>
          <property>metrics/Sw-sqft</property>
          <property>aero/bi2vel</property>
          <property>velocities/p-aero-rad_sec</property>
          <table>
            <independentVar lookup="row">aero/Re</independentVar>
            <tableData>
              79088544   0.3930
              86997400   0.0284
              118632808   0.0126
              157806896   0.0071
            </tableData>
          </table>
	</product>
      </function>

      <function name="aero/force/Side_yaw_rate">
	<description>Side force due to yaw rate</description>
	<product>
          <property>aero/qbar-psf</property>
          <property>metrics/Sw-sqft</property>
          <property>aero/bi2vel</property>
          <property>velocities/r-aero-rad_sec</property>
          <value>0.6164</value>
	</product>
      </function>

      <function name="aero/force/Side_rudder">
	<description>Side force due to rudder</description>
	<product>
          <property>aero/qbar-psf</property>
          <property>metrics/Sw-sqft</property>
          <property>fcs/rudder-pos-rad</property>
          <value>0.1641</value>
	</product>
      </function>

    </axis>

    <axis name="PITCH">

      <function name="aero/moment/Pitch_alpha">
	<description>Pitch moment due to alpha</description>
	<product>
          <property>aero/qbar-psf</property>
          <property>metrics/Sw-sqft</property>
          <property>metrics/cbarw-ft</property>
          <property>aero/alpha-rad</property>
          <value>-0.3174</value>
	</product>
      </function>

      <function name="aero/moment/Pitch_elevator">
	<description>Pitch moment due to elevator</description>
	<product>
          <property>aero/qbar-psf</property>
          <property>metrics/Sw-sqft</property>
          <property>metrics/cbarw-ft</property>
          <property>fcs/elevator-pos-rad</property>
          <table>
            <independentVar lookup="row">velocities/mach</independentVar>
            <tableData>
              0.0    -0.2895
              2.0    -0.0724
            </tableData>
          </table>
	</product>
      </function>

      <function name="aero/moment/Pitch_damp">
	<description>Pitch moment due to pitch rate</description>
	<product>
          <property>aero/qbar-psf</property>
          <property>metrics/Sw-sqft</property>
          <property>metrics/cbarw-ft</property>
          <property>aero/ci2vel</property>
          <property>velocities/q-aero-rad_sec</property>
          <value>-0.6068</value>
	</product>
      </function>

      <function name="aero/moment/Pitch_alphadot">
	<description>Pitch moment due to alpha rate</description>
	<product>
          <property>aero/qbar-psf</property>
          <property>metrics/Sw-sqft</property>
          <property>metrics/cbarw-ft</property>
          <property>aero/ci2vel</property>
          <property>aero/alphadot-rad_sec</property>
          <value>-0.2427</value>
	</product>
      </function>

    </axis>

    <axis name="ROLL">

      <function name="aero/moment/Roll_beta">
	<description>Roll moment due to beta</description>
	<product>
          <property>aero/qbar-psf</property>
          <property>metrics/Sw-sqft</property>
          <property>metrics/bw-ft</property>
          <property>aero/beta-rad</property>
          <table>
            <independentVar lookup="row">aero/alpha-rad</independentVar>
            <independentVar lookup="column">aero/Re</independentVar>
            <tableData>
              79088544  86997400  118632808  157806896
              -0.0349  -0.2540  -0.1122  -0.1075  -0.1083
              0.3491  -2.7002  -0.3492  -0.3590  -0.3882
            </tableData>
          </table>
	</product>
      </function>

      <function name="aero/moment/Roll_damp">
	<description>Roll moment due to roll rate</description>
	<product>
          <property>aero/qbar-psf</property>
          <property>metrics/Sw-sqft</property>
          <property>metrics/bw-ft</property>
          <property>aero/bi2vel</property>
          <property>velocities/p-aero-rad_sec</property>
          <value>-0.8478</value>
	</product>
      </function>

      <function name="aero/moment/Roll_yaw">
	<description>Roll moment due to yaw rate</description>
	<product>
          <property>aero/qbar-psf</property>
          <property>metrics/Sw-sqft</property>
          <property>metrics/bw-ft</property>
          <property>aero/bi2vel</property>
          <property>velocities/r-aero-rad_sec</property>
          <table>
            <independentVar lookup="row">aero/alpha-rad</independentVar>
            <independentVar lookup="column">aero/Re</independentVar>
            <tableData>
              79088544 86997400118632808157806896
              -0.0349   0.0446   0.0446   0.0446   0.0446
              0.3491   5.2494   0.5431   0.5431   0.5431
            </tableData>
          </table>
	</product>
      </function>

      <function name="aero/moment/Roll_aileron">
	<description>Roll moment due to aileron</description>
	<product>
          <property>aero/qbar-psf</property>
          <property>metrics/Sw-sqft</property>
          <property>metrics/bw-ft</property>
          <property>fcs/left-aileron-pos-rad</property>
          <table>
            <independentVar lookup="row">velocities/mach</independentVar>
            <tableData>
              0.0    0.1000
              2.0    0.0250
            </tableData>
          </table>
	</product>
      </function>

      <function name="aero/moment/Roll_rudder">
	<description>Roll moment due to rudder</description>
	<product>
          <property>aero/qbar-psf</property>
          <property>metrics/Sw-sqft</property>
          <property>metrics/bw-ft</property>
          <property>fcs/rudder-pos-rad</property>
          <value>0.0100</value>
	</product>
      </function>

    </axis>

    <axis name="YAW">

      <!-- Stall initiator -->
      <function name="aero/moment/Yaw_alpha">
	<description>Yaw moment due to alpha</description>
	<product>
          <property>aero/qbar-psf</property>
          <property>metrics/Sw-sqft</property>
          <property>metrics/bw-ft</property>
          <property>aero/alpha-rad</property>
          <property>fcs/gear-no-wow</property>
          <table>
            <independentVar lookup="row">aero/beta-rad</independentVar>
            <independentVar lookup="column">aero/Re</independentVar>
            <tableData>
              79088544 86997400
              -0.3491  -1.0000   0.0000
              0.3491   1.0000   0.0000
            </tableData>
          </table>
	</product>
      </function>

      <function name="aero/moment/Yaw_beta">
	<description>Yaw moment due to beta</description>
	<product>
          <property>aero/qbar-psf</property>
          <property>metrics/Sw-sqft</property>
          <property>metrics/bw-ft</property>
          <property>aero/beta-rad</property>
          <value>0.1481</value>
	</product>
      </function>

      <function name="aero/moment/Yaw_roll_rate">
	<description>Yaw moment due to roll rate</description>
	<product>
          <property>aero/qbar-psf</property>
          <property>metrics/Sw-sqft</property>
          <property>metrics/bw-ft</property>
          <property>aero/bi2vel</property>
          <property>velocities/p-rad_sec</property>
          <table>
            <independentVar lookup="row">aero/Re</independentVar>
            <tableData>
              79088544  -0.2206
              86997400  -0.0159
              118632808  -0.0071
              157806896  -0.0040
            </tableData>
          </table>
	</product>
      </function>

      <function name="aero/moment/Yaw_damp">
	<description>Yaw moment due to yaw rate</description>
	<product>
          <property>aero/qbar-psf</property>
          <property>metrics/Sw-sqft</property>
          <property>metrics/bw-ft</property>
          <property>aero/bi2vel</property>
          <property>velocities/r-aero-rad_sec</property>
          <value>-0.2354</value>
	</product>
      </function>

      <function name="aero/moment/Yaw_rudder">
	<description>Yaw moment due to rudder</description>
	<product>
          <property>aero/qbar-psf</property>
          <property>metrics/Sw-sqft</property>
          <property>metrics/bw-ft</property>
          <property>fcs/rudder-pos-rad</property>
          <value>-0.0921</value>
	</product>
      </function>

      <function name="aero/moment/Yaw_aileron">
	<description>Adverse yaw</description>
	<product>
          <property>aero/qbar-psf</property>
          <property>metrics/Sw-sqft</property>
          <property>metrics/bw-ft</property>
          <property>fcs/left-aileron-pos-rad</property>
          <value>0.0000</value>
	</product>
      </function>

    </axis>

  </aerodynamics>

  <external_reactions>
  </external_reactions>

</fdm_config>
